# Kokkos-stdexec LJ melt. The force zero runs on a side stream and overlaps
# the halo exchange. The pair kernel waits for it on the device.
#
# Run:
#   lmp -k on g 1 -sf kk -in in.lj

variable        x index 1
variable        y index 1
variable        z index 1

variable        xx equal 8*$x
variable        yy equal 8*$y
variable        zz equal 8*$z

units           lj
atom_style      atomic

lattice         fcc 0.8442
region          box block 0 ${xx} 0 ${yy} 0 ${zz}
create_box      1 box
create_atoms    1 box
mass            1 1.0

velocity        all create 1.44 87287 loop geom

pair_style      lj/cut 2.5
pair_coeff      1 1 1.0 1.0 2.5

neighbor        0.3 bin
neigh_modify    delay 0 every 20 check no

fix             1 all nve

thermo          10
run             20
